Simulations: Version=2
  Replacements
    Plant Grapevine: CropType=Grapevine
      Memo TitlePage
        # The APSIM Grapevine Model

        _Brown, H.E., Huth, N.I. and Holzworth, D.P._

        ##Building the model.
        The APSIM Grapevine model has been described in part by [Brown_etal_2011] and developed using the Plant Modelling Framework (PMF) of [brown_plant_2014]. This new framework provides a library of plant organ and process submodels that can be coupled, at runtime, to construct a model in much the same way that models can be coupled to construct a simulation. This means that dynamic composition of lower level process and organ classes (e.g. photosynthesis, leaf) into larger constructions (e.g. maize, wheat, sorghum) can be achieved by the model developer without additional coding.

        The model consists of:

        * a phenology model to simulate development between growth phases
        * a structure model to simulate plant morphology
        * a collection of organs to simulate the various plant parts
        * an arbitrator to allocate resources (N, biomass) to the various plant organs

        ##Pecularities of Grapevine
        Grapevine is a challenging crop to model because it is vegetatviely propigated.  For seed propigate crops, plants are always equally dormant at planting and their development begins there on.  With Grapevine the physiological status of the seed tubers vary depending on:
        * the conditions the mother plant encountered late in its life (Stress, Desication etc)
        * the conditions that the tuber was stored (Cool store, ground store, dry store etc)
        * treatment of the seed prior to planting (chitting, cutting etc)
        All of these factors infuence the developmental behaviour of the crop that is produced including
        * The timing of emergence
        * The number of stems produced per plant and subsequent tuber number and canopy development
        * The timing of tuber initiation and subsequent growth and partitioning
        * The duration of haulm growth and subsequent tuber filling duration

        There are an enormous number of Grapevine cultivars and they, they all differ in their responses of post planting behavour due to pre planting seed conditions, there is not a good quantitative understanding of how environment and managemet of seed Grapevine prior to planting influences post planting behaviour and it is beyond the scope of the current APSIM infrastructure to provide environmental conditions during storage of seed.  We have tried but with a list of excuses this long we have not yet succeeded in building the effects of seed physiology into the Grapevine model in anything other than a very elementry way.  However, it is possible to set the model up to capture seed effects for specific simulations.

        ##Including a Grapevine crop in an APSIM simulation
        To indluce a Grapevine crop in a simulation the Grapevine model needs to be added to the paddock, field or zone in which it is to be grown.  This can be done by right clicking on the paddock, selecting Add from the drop down menu and then selecting Grapevine from the list that comes up.  A sowing action also needs to be set to start the crop off and a harvest event to remove the Grapevine crop so the next crop can be simulated.  The PlantGrapevines manager module that is included in the Grapevine Example simulation has script written to instigate these events and can be copied from the example simulation into other simulations.
        ###Setting sowing depth (emergence date)
        The Grapevine model predicts emergence date as a function of sowing depth and all subsequent phenology is dependent on this timing.  Because this date is effected by seed physiology and can't yet be modeled we recommend that planting depth is not set at the actual planting depth, but varied to ensure the model predicts a realistic emergence date.
        ###Setting stem number (tuber number and early canopy growth)
        The GrapevineManagement script sets the number of stems that will appear from each seed piece.  This varies enormiously due to seed physiology and variety and should be set to a number that is realistic for the cultivar being simulated and the pre-planting treatment of the seed tubers.  This parameter influences tuber number and the early development of the canopy so should be set carefully.
        ###Setting final leaf number (Crop duration)
        The duration of a Grapevine crop is determined by the number of leaves that the mainstem produces and how long it takes for these to appear and seness.  This responds to photoperiod in many varieties and is influenced by the pre-planting treatment of seed tubers.  As such this parameter is given a default value for each cultivar but can also be set in the GrapevineManagement script if more is know about the expected determinany of the Grapevinees under the circumstances being simulated.  Please read  [Brown_etal_2011] for a clear definition of final leaf number.
      Phenology: DaysAfterSowing=0
        AirTemperatureFunction ThermalTime
          XYPairs: X=[0, 30, 35, 40, 45]; Y=[0, 1, 1, 0, 0]
        GenericPhase Dormant: Start=StartDomancy; End=EndDomancy
          Constant Target: Value=13.5; Units=days
          AirTemperatureFunction ThermalTime
            XYPairs: X=[0, 4, 8, 20]; Y=[1, 1, 0, 0]
        BuddingPhase Budding: Start=EndDomancy; End=BudBurst
          Memo
            During the vegetative phase the crop is only growing stem, root and leaf.  Tuber initiation usually occurs soon after emergence and the duration of this phase can be influenced by the physiological status of the seed tuber at planting.  As discussed above, we do not have a suitable method for modelling this yet so we have treated the time from emergence to tuber initiation as a thermal time constant.
          VariableReference ThermalTime: VariableName=[Phenology].ThermalTime.Value
          MultiplyFunction Target
            Constant Base: Value=51
            LinearInterpolationFunction ChillingTadjustment: XProperty=[Budding].AccChill.Value
              XYPairs: X=[5, 13.8, 23.3, 32.7, 42]; Y=[1, 0.66, 0.53, 0.46, 0.43]
          AccumulateFunction AccChill: StartStageName=StartDomancy; EndStageName=BudBurst; ResetStageName=StartDomancy
            VariableReference ThermalTime: VariableName=[Phenology].Dormant.ThermalTime.Value
        GenericPhase ShootGrowth: Start=BudBurst; End=StartFlowering
          Constant Target: Value=29
          VariableReference ThermalTime: VariableName=[Phenology].ThermalTime.Value
        GenericPhase FlowerDevelopment: Start=StartFlowering; End=FruitSet
          Constant Target: Value=7; Units=dd
          VariableReference ThermalTime: VariableName=[Phenology].ThermalTime.Value
        GenericPhase BerryDevelopment: Start=FruitSet; End=Veraison
          Constant Target: Value=20
          AirTemperatureFunction ThermalTime
            XYPairs: X=[0, 25, 35, 40]; Y=[0, 1, 1, 0]
        LeafDeathPhase: Start=Veraison; End=LeafFall
          VariableReference ThermalTime: VariableName=[Phenology].ThermalTime.Value
        GotoPhase: Start=LeafFall; End=Unused; FractionComplete=0; PhaseNameToGoto=Dormant
        OnEventFunction BudBurstDOY: SetEvent=BudBurst; ReSetEvent=StartDomancy
          Memo
            A function is used to provide flowering date as days after sowing(DAS).
          Constant PreEventValue: Value=0
          VariableReference PostEventValue: VariableName=[Clock].Today.DayOfYear
        OnEventFunction FloweringDOY: SetEvent=StartFlowering; ReSetEvent=StartDomancy
          Memo
            A function is used to provide flowering date as days after sowing(DAS).
          Constant PreEventValue: Value=0
          VariableReference PostEventValue: VariableName=[Clock].Today.DayOfYear
        OnEventFunction VeraisonDOY: SetEvent=Veraison; ReSetEvent=StartDomancy
          Memo
            A function is used to provide flowering date as days after sowing(DAS).
          Constant PreEventValue: Value=0
          VariableReference PostEventValue: VariableName=[Clock].Today.DayOfYear
      OrganArbitrator Arbitrator: NArbitrationOption=PriorityThenRelativeAllocation; DMArbitrationOption=RelativeAllocation
      Structure: Initialised=false; Germinated=false; Emerged=false; CohortToInitialise=0; TipToAppear=0
        PhaseLookupValue MainStemPrimordiaInitiationRate: Start=BudBurst; End=Veraison
          Constant: Value=30
        PhaseLookupValue MainStemNodeAppearanceRate: Start=BudBurst; End=Veraison
          Constant: Value=30
        Constant MainStemFinalNodeNumber: Value=24
        LinearInterpolationFunction HeightModel: XProperty=[Stem].Live.Wt
          XYPairs: X=[0, 200, 1200, 4000]; Y=[1800, 1800, 1800, 1800]
        MultiplyFunction BranchingRate
          LinearInterpolationFunction Potential_Branching_Rate: XProperty=[Structure].LeafTipsAppeared
            XYPairs: X=[0, 7, 8, 13, 14, 34]; Y=[0, 0, 0, 0, 0, 0]
          LinearInterpolationFunction: XProperty=[Leaf].CoverGreen
            XYPairs: X=[0, 0.4, 0.55, 0.8, 1]; Y=[1, 1, 0.45, 0, 0]
        Constant BranchMortality: Value=0
        Constant DroughtInducedBranchMortality: Value=0
        AirTemperatureFunction ThermalTime
          XYPairs: X=[0, 30, 35, 40, 45]; Y=[0, 30, 30, 0, 0]
      Leaf: CurrentExpandingLeaf=34; StartFractionExpanded=0.83819; FractionNextleafExpanded=0.926641; MaxCover=1; Albedo=0.25; Gsmax=0.01; R50=200; MicroClimatePresent=true; KDead=0.03; MaximumMainStemLeafNumber=24
        zero: GrowthRespiration, MaintenanceRespiration, DeadNodesYesterday, FRGR, PotentialEP, DMConversionEfficiency, TipsAtEmergence, CohortsAtInitialisation, FractionDied
        VariableReference ThermalTime: VariableName=[Structure].ThermalTime.Value
        LeafCohort InitialLeaf1: DeltaWaterConstrainedArea=0; DeltaCarbonConstrainedArea=0; Rank=1; Area=1000; MaintenanceRespiration=0
        LeafCohort InitialLeaf2: DeltaWaterConstrainedArea=0; DeltaCarbonConstrainedArea=0; Rank=2; Area=0; MaintenanceRespiration=0
        LeafCohort InitialLeaf3: DeltaWaterConstrainedArea=0; DeltaCarbonConstrainedArea=0; Rank=3; Area=0; MaintenanceRespiration=0
        LeafCohortParameters CohortParameters
          LinearInterpolationFunction MaxArea: XProperty=[Structure].RelativeNodeApperance
            XYPairs: X=[0, 0.15, 1]; Y=[5000, 15000, 10000]
          LinearInterpolationFunction GrowthDuration: XProperty=[Structure].RelativeNodeApperance
            XYPairs: X=[0, 0.3, 0.4, 1]; Y=[150, 150, 150, 150]
          LinearInterpolationFunction LagDuration: XProperty=[Structure].RelativeNodeApperance
            XYPairs: X=[0, 0.15, 0.3, 0.4, 0.73, 1]; Y=[2000, 2000, 2000, 2000, 2000, 2000]
          LinearInterpolationFunction SenescenceDuration: XProperty=[Structure].RelativeNodeApperance
            XYPairs: X=[0, 0.2, 1]; Y=[400, 400, 800]
          Constant DetachmentLagDuration: Value=1000000
          Constant DetachmentDuration: Value=1000000
          LinearInterpolationFunction SpecificLeafAreaMax: XProperty=[Structure].RelativeNodeApperance
            XYPairs: X=[0, 1]; Y=[40000, 25000]
          Constant SpecificLeafAreaMin: Value=20000; Units=mm2/g
          Constant StructuralFraction: Value=0.99
          Constant MaximumNConc: Value=0.05; Units=g/g
          Constant MinimumNConc: Value=0.01; Units=g/g
          Constant InitialNConc: Value=0.04; Units=g/g
          Constant NReallocationFactor: Value=0
          Constant NRetranslocationFactor: Value=0
          LinearInterpolationFunction ExpansionStress: XProperty=[Grapevine].WaterSupplyDemandRatio
            XYPairs: X=[0, 1]; Y=[1, 1]
          Constant CriticalNConc: Value=0.01
          Constant DMRetranslocationFactor: Value=0
          LinearInterpolationFunction ShadeInducedSenescenceRate: XProperty=[Leaf].CohortCurrentRankCoverAbove
            XYPairs: X=[0, 0.5, 0.8, 1]; Y=[0, 0, 0, 0]
          Constant NonStructuralFraction: Value=0.2
          Constant SenessingLeafRelativeSize: Value=1; Units=0-1
          Constant DMReallocationFactor: Value=0
          Constant LeafSizeShapeParameter: Value=0.01
          Constant MaintenanceRespirationFunction: Value=0
        RUEModel Photosynthesis
          Constant RUE: Value=0.8; Units=g/MJ
          RUECO2Function FCO2: PhotosyntheticPathway=C3
          LinearInterpolationFunction FN: XProperty=[Leaf].Fn
            XYPairs: X=[0, 1, 1.5]; Y=[0, 1, 1]
          WeightedTemperatureFunction FT: MaximumTemperatureWeighting=0.75
            XYPairs: X=[5, 20, 30, 45]; Y=[0, 1, 1, 0]
          LinearInterpolationFunction FW: XProperty=[Leaf].Fw
            XYPairs: X=[0, 1, 1.5]; Y=[0, 1, 1]
          LinearInterpolationFunction FVPD: XProperty=[Leaf].Photosynthesis.VPD
            XYPairs: X=[0, 10, 50]; Y=[1, 1, 1]
          VariableReference RadnInt: VariableName=[Leaf].RadIntTot
        MinimumFunction FRGRFunction
          VariableReference RUE_FT: VariableName=[Leaf].Photosynthesis.FT.Value
          MinimumFunction Others
            VariableReference RUE_FN: VariableName=[Leaf].Photosynthesis.FN.Value
            VariableReference RUE_FVPD: VariableName=[Leaf].Photosynthesis.FVPD.Value
        MultiplyFunction ExtinctionCoeff
          Constant: Value=0.5
        CompositeBiomass Live: Propertys=[[Leaf].CohortLive]
        CompositeBiomass Dead: Propertys=[[Leaf].CohortDead]
        CompositeBiomass Total: Propertys=[[Leaf].Live, [Leaf].Dead]
        ArrayBiomass CohortArrayLive: Propertys=[[Leaf].Live]; ArraySize=[Leaf].MaxNodeNo
        ArrayBiomass CohortArrayDead: Propertys=[[Leaf].Dead]; ArraySize=[Leaf].MaxNodeNo
        BiomassRemoval BiomassRemovalDefaults
          OrganBiomassRemovalType Harvest: FractionLiveToRemove=0; FractionDeadToRemove=0; FractionLiveToResidue=0.2; FractionDeadToResidue=0.4
          OrganBiomassRemovalType Cut: FractionLiveToRemove=0; FractionDeadToRemove=0; FractionLiveToResidue=0.2; FractionDeadToResidue=0.3
          OrganBiomassRemovalType Prune: FractionLiveToRemove=0; FractionDeadToRemove=0; FractionLiveToResidue=0.5; FractionDeadToResidue=0.5
          OrganBiomassRemovalType Graze: FractionLiveToRemove=0.6; FractionDeadToRemove=0; FractionLiveToResidue=0.1; FractionDeadToResidue=0
        Constant StructuralFraction: Value=0.99
        PhaseLookupValue FrostFraction: Start=Veraison; End=LeafFall
          LinearInterpolationFunction: XProperty=[Weather].MinT
            XYPairs: X=[4, 3]; Y=[0, 0]
      Cultivar Sauvignonblac
      Root: GrowthRespiration=0; MaintenanceRespiration=0
        CompositeBiomass Live: Propertys=[[Root].LayerLive]
        CompositeBiomass Dead: Propertys=[[Root].LayerDead]
        PhaseBasedSwitch NitrogenDemandSwitch: Start=BudBurst; End=LeafFall
        Constant MaximumNConc: Value=0.01
        Constant MaximumRootDepth: Value=1000000
        LinearInterpolationFunction MaxDailyNUptake: XProperty=[Root].Length
          XYPairs: X=[0, 0.02]; Y=[0, 6]
        Constant MinimumNConc: Value=0.01
        LinearInterpolationFunction KLModifier: XProperty=[Leaf].LAI
          XYPairs: X=[0, 3]; Y=[1, 1]
        LinearInterpolationFunction SenescenceRate: XProperty=[Leaf].FractionDied
          XYPairs: X=[0, 1]; Y=[0, 0.1]
        BiomassRemoval BiomassRemovalDefaults
          OrganBiomassRemovalType Harvest: FractionLiveToRemove=0; FractionDeadToRemove=0; FractionLiveToResidue=0.2; FractionDeadToResidue=0
          OrganBiomassRemovalType Cut: FractionLiveToRemove=0; FractionDeadToRemove=0; FractionLiveToResidue=0.3; FractionDeadToResidue=0
          OrganBiomassRemovalType Prune: FractionLiveToRemove=0; FractionDeadToRemove=0; FractionLiveToResidue=0.1; FractionDeadToResidue=0
          OrganBiomassRemovalType Graze: FractionLiveToRemove=0; FractionDeadToRemove=0; FractionLiveToResidue=0.15; FractionDeadToResidue=0
        LinearInterpolationFunction KNO3: XProperty=[Root].RootLengthDenisty
          XYPairs: X=[0, 0.003]; Y=[0.02, 0.02]
        LinearInterpolationFunction KNH4: XProperty=[Root].RootLengthDenisty
          XYPairs: X=[0, 0.003]; Y=[0, 0]
        LinearInterpolationFunction NUptakeSWFactor: XProperty=[Root].RWC
          XYPairs: X=[0, 1]; Y=[0, 1]
        Constant InitialDM: Value=5; Units=g/plant
        Constant SpecificRootLength: Value=40; Units=m/g
        Constant RootFrontVelocity: Value=10
        Constant PartitionFraction: Value=0.2
      GenericOrgan Stem
        Constant NReallocationFactor: Value=0
        Constant NRetranslocationFactor: Value=0.05
        PhaseBasedSwitch NitrogenDemandSwitch: Start=BudBurst; End=LeafFall
        Constant DMRetranslocationFactor: Value=0
        InternodeDemandFunction DMDemandFunction
          Constant InterNodeWt: Value=0.2
        LinearInterpolationFunction MaximumNConc: XProperty=[Phenology].Stage
          XYPairs: X=[3, 4, 5.3]; Y=[0.06, 0.05, 0.025]
        Constant MinimumNConc: Value=0.006
        Biomass Live
        Biomass Dead
        BiomassRemoval BiomassRemovalDefaults
          OrganBiomassRemovalType Harvest: FractionLiveToRemove=0.5; FractionDeadToRemove=0; FractionLiveToResidue=0.1; FractionDeadToResidue=0
          OrganBiomassRemovalType Cut: FractionLiveToRemove=0.8; FractionDeadToRemove=0; FractionLiveToResidue=0; FractionDeadToResidue=0
          OrganBiomassRemovalType Prune: FractionLiveToRemove=0; FractionDeadToRemove=0; FractionLiveToResidue=0.6; FractionDeadToResidue=0
          OrganBiomassRemovalType Graze: FractionLiveToRemove=0.6; FractionDeadToRemove=0; FractionLiveToResidue=0.2; FractionDeadToResidue=0
        Constant InitialWtFunction: Value=0; Units=g/m^2
        Constant StructuralFraction: Value=1; Units=g/g
        Constant DetachmentRateFunction: Value=0; Units=/d
        Constant SenescenceRate: Value=0; Units=/d
        Constant MaintenanceRespirationFunction: Value=0; Units=0-1
        Constant DMConversionEfficiency: Value=1; Units=0-1
      ReproductiveOrgan Berry: GrowthRespiration=0; MaintenanceRespiration=0; RipeStage=Ripe
        Biomass Live
        Biomass Dead
        Constant MaxNConcDailyGrowth: Value=0.01; Units=g/g
        Constant NFillingRate: Value=0
        Constant MinimumNConc: Value=0
        Constant MaximumNConc: Value=0.0001
        AccumulateFunction ThermalTimeAfterVeraison: StartStageName=Veraison; EndStageName=LeafFall; ResetStageName=Veraison
          VariableReference ThermalTime: VariableName=[Phenology].ThermalTime.Value
        LinearInterpolationFunction ReadyForHarvest
          XYPairs: X=[0, 200, 201]; Y=[0, 0, 1]
        AccumulateFunction ThermalTimeAfterFlowering: StartStageName=FruitSet; EndStageName=LeafFall; ResetStageName=FruitSet
          VariableReference ThermalTime: VariableName=[Phenology].ThermalTime.Value
        ExponentialFunction SolubleSolidsConc: A=24; B=-15.6582; C=-0.040501
          VariableReference ThermalTime: VariableName=[Berry].DaysAfterVeraison.Value
        MultiplyFunction NumberFunction
          VariableReference Shoots: VariableName=[Structure].MainStemPopn
          OnEventFunction BunchesPerShoot: SetEvent=BudBurst; ReSetEvent=EndDormancy
            Constant PreEventValue: Value=0
            LinearInterpolationFunction PostEventValue: XProperty=[Berry].MeanFloweringTempY0.Value
              XYPairs: X=[0, 40]; Y=[0, 5]
          AddFunction PotentialBerriesPerBunch
            Constant MinNum: Value=66
            SigmoidFunction BerriesPerBunch: Xmax=44; Xo=16.3; b=0.7
              VariableReference XVariable: VariableName=[Berry].MeanFloweringTemp.Value
        OnEventFunction MeanFloweringTempY0: SetEvent=FruitSet; ReSetEvent=StartFlowering
          Constant PreEventValue: Value=13
          LinearInterpolationFunction PostEventValue: XProperty=[Berry].MeanFloweringTemp.Value
            XYPairs: X=[0, 40]; Y=[0, 40]
        DivideFunction MeanFloweringTemp
          AccumulateFunction Temperature: StartStageName=StartFlowering; EndStageName=FruitSet; ResetStageName=StartFlowering
            AirTemperatureFunction
              XYPairs: X=[0, 40]; Y=[0, 40]
          AccumulateFunction Time: StartStageName=StartFlowering; EndStageName=FruitSet; ResetStageName=StartFlowering
            Constant Days: Value=1; Units=days/day
        BerryFillingRateFunction DMDemandFunction: FirstPhase=BerryDevelopment; SecondPhase=LeafDeathPhase; Wo1=0.0001; Wf1=0.199; Mu1=0.007; Wo2=0.0001; Wf2=0.3; Mu2=0.011
          VariableReference TT: VariableName=[Structure].ThermalTime.Value
        BiomassRemoval BiomassRemovalDefaults
          OrganBiomassRemovalType Harvest: FractionLiveToRemove=1; FractionDeadToRemove=0; FractionLiveToResidue=0; FractionDeadToResidue=0
          OrganBiomassRemovalType Cut: FractionLiveToRemove=1; FractionDeadToRemove=0; FractionLiveToResidue=0; FractionDeadToResidue=0
          OrganBiomassRemovalType Prune: FractionLiveToRemove=0; FractionDeadToRemove=0; FractionLiveToResidue=1; FractionDeadToResidue=0
          OrganBiomassRemovalType Graze: FractionLiveToRemove=0; FractionDeadToRemove=0; FractionLiveToResidue=0; FractionDeadToResidue=0
          OrganBiomassRemovalType Thin: FractionLiveToRemove=0; FractionDeadToRemove=0; FractionLiveToResidue=0; FractionDeadToResidue=0
        Constant MaximumPotentialGrainSize: Value=2; Units=g
        SubtractFunction WaterContent
          Constant: Value=0.903
          PhaseLookupValue: Start=Veraison; End=LeafFall
            LinearInterpolationFunction: XProperty=[Berry].ThermalTimeAfterVeraison.Value
              XYPairs: X=[0, 100, 200, 300, 400, 600]; Y=[0, 0.01, 0.02, 0.04, 0.15, 0.15]
    Report: EventNames=[Clock].DoReport
      VariableNames:
        Name as Zone
        [Clock].Today
        [Clock].Today.Year
        [Grapevine].Phenology.Stage
        [Grapevine].Phenology.BudBurstDOY.Value
        [Grapevine].Phenology.FloweringDOY.Value
        [Grapevine].Phenology.VeraisonDOY.Value
        [Grapevine].Phenology.CurrentStageName
        [Grapevine].Structure.LeafTipsAppeared
        [Grapevine].Structure.PlantTotalNodeNo
        [Grapevine].Leaf.InitialisedCohortNo
        [Grapevine].Leaf.DeadCohortNo
        [Grapevine].Leaf.AppearedCohortNo
        [Grapevine].Leaf.CohortSize
        [Grapevine].Leaf.Fn
        [Grapevine].Leaf.Fw
        [Grapevine].Berry.Number
        [Grapevine].Berry.Live.Wt
        [Berry].MeanFloweringTempY0.Value
        [Berry].MeanFloweringTemp.Value
        [Berry].NumberFunction.Value
        [Berry].NumberFunction.Shoots.Value
        [Berry].NumberFunction.BunchesPerShoot.Value
        [Berry].NumberFunction.PotentialBerriesPerBunch.Value
  DataStore
    ExcelInput: FileName=Observations\PhenoDataObservation.xlsx; SheetNames=[Data]
    PredictedObserved: PredictedTableName=Report; ObservedTableName=Data; FieldNameUsedForMatch=Grapevine.Phenology.CurrentStageName; FieldName2UsedForMatch=Clock.Today.Year
      Tests: POName=PredictedObserved
        AcceptedStats:
          Name                                    n   Slope     Intercept  SEslope   SEintercept  R2          RMSE     NSE       ME        MAE      RSR
          Grapevine.Phenology.BudBurstDOY.Value   40  0.293927  175.481    0.197067  54.8841      0.0553046   22.5072  -15.5832  -21.125   21.675   4.02102
          Grapevine.Phenology.FloweringDOY.Value  42  0.422599  179.337    0.14855   51.3757      0.16828     21.1311  -15.4152  -20.3333  20.3333  4.00305
          Grapevine.Phenology.VeraisonDOY.Value   36  1.61989   -66.5008   3.78083   282.897      0.00537006  125.994  -498.302  -20.25    100.528  22.0325
        AcceptedStatsName=Name n Slope Intercept SEslope SEintercept R2 RMSE NSE ME MAE RSR
  Simulation grapeTest
    Weather: FileName=%root%\Examples\WeatherFiles\lincoln.met
    Clock: StartDate=2005-04-30; EndDate=2007-09-05
    Summary
    SoilArbitrator Soil Arbitrator
    Zone Vineyard: Area=0; Slope=0
      Soil: SoilType=Sedementary; LocalName=Lincoln; Latitude=0; Longitude=0; Area=0
        Water
          Thickness  BD   AirDry  LL15  DUL   SAT
          100        1.2  0.08    0.16  0.33  0.5
          200        1.2  0.16    0.16  0.33  0.5
          300        1.2  0.15    0.15  0.31  0.44
          300        1.2  0.13    0.13  0.27  0.46
          300        1.2  0.15    0.15  0.3   0.44
          300        1.2  0.15    0.15  0.3   0.44
          SoilCrop GrapevineSoil: LL=[0.13, 0.13, 0.1, 0.15, 0.3, 0.3]; KL=[0.1, 0.06, 0.04, 0.01, 0, 0]; XF=[1, 1, 1, 1, 0, 0]
        SoilWater: SummerDate=1-Nov; SummerU=9; SummerCona=4.4; WinterDate=1-Apr; WinterU=9; WinterCona=4.4; DiffusConst=88; DiffusSlope=35.4; Salb=0.18; CN2Bare=0; CNRed=-9E-05; CNCov=0; slope=0; discharge_width=0; catchment_area=0; max_pond=0; residueinterception=0
          Thickness  SWCON  KLAT
          100        0.55   0
          200        0.55   0
          300        0.55   0
          300        0.55   0
          300        0.55   0
          300        0.55   0
        SoilNitrogen: fom_type=[default, manure, mucuna, lablab, shemp, stable]; fract_carb=[0.2, 0.3, 0.54, 0.57, 0.45, 0]; fract_cell=[0.7, 0.3, 0.37, 0.37, 0.47, 0.1]; fract_lign=[0.1, 0.4, 0.09, 0.06, 0.08, 0.9]; urea_min=[0, 0, 0, 0, 0, 0]; nh4_min=[0, 0, 0, 0, 0, 0]; no3_min=[0, 0, 0, 0, 0, 0]; wfpsN2N2O_x=[22, 88]; wfpsN2N2O_y=[0.1, 1]; oc=[3.50876, 2.50004, 1.20034, 1.03026, 0.470168, 0.470086]
        SoilOrganicMatter: RootCN=30; RootWt=3000; SoilCN=11.5; EnrACoeff=7.4; EnrBCoeff=0.2; OCUnits=Total
          Thickness  OC    FBiom  FInert
          100        3.5   0.025  0.3
          200        2.5   0.025  0.4
          300        1.2   0.015  0.75
          300        1.03  0.01   0.9
          300        0.47  0.01   0.96
          300        0.47  0.01   0.96
        Analysis: Thickness=[100, 200, 300, 300, 300, 300]; PH=[6.6, 6.2, 5.7, 5.5, 5.5, 5.5]; PHUnits=Water; BoronUnits=HotWater
        InitialWater Initial water: PercentMethod=FilledFromTop; FractionFull=1
        Sample: NO3Units=kgha; NH4Units=kgha; SWUnits=Volumetric; OCUnits=Total; PHUnits=Water
          Thickness  NO3   NH4
          100        40    0.1
          200        30    0.1
          300        14    0.1
          300        14    0.1
          300        1.38  0.1
          300        1.38  0.1
      SurfaceOrganicMatter: PondActive=no; ReportAdditions=no; ReportRemovals=no; PoolName=Grapevine; type=Grapevine; mass=2000; standing_fraction=0; cnr=80; CriticalResidueWeight=2000; OptimumDecompTemp=20; MaxCumulativeEOS=20; CNRatioDecompCoeff=0.277; CNRatioDecompThreshold=25; TotalLeachRain=25; MinRainToLeach=10; CriticalMinimumOrganicC=0.004; DefaultCPRatio=0; DefaultStandingFraction=0; StandingExtinctCoeff=0.5; FractionFaecesAdded=0.5
        Pools:
          {PoolName=Grapevine, ResidueType=Grapevine, Mass=2000, CNRatio=80, StandingFraction=0}
        ResidueTypes: LoadFromResource=ResidueTypes
        TillageTypes TillageTypesList
      MicroClimate: a_interception=0; b_interception=1; c_interception=0; d_interception=0; soil_albedo=0.23; air_pressure=1010; soil_emissivity=0.96; sun_angle=15; soil_heat_flux_fraction=0.4; night_interception_fraction=0.5; windspeed_default=3; refheight=2; albedo=0.15; emissivity=0.96; gsmax=0.01; r50=200; RadIntTotal=0
      Irrigation
      Fertiliser
      Plant Grapevine: CropType=Grapevine; SowingDate=2005-05-01
      Operations
        2005-05-01  [Grapevine].Sow(population: 0.1667, cultivar: "Sauvignonblac", depth: 50, rowSpacing: 3100, budNumber:24);
      Report: EventNames=[Clock].DoReport
      Manager Pruning
        PruneDateString = 15-May
```csharp
using System;
using System.Collections.Generic;
using Models.Core;
using Models.PMF;
using Models.PMF.Interfaces;
using System.Xml.Serialization;

namespace Models
{
	[Serializable] 
	[System.Xml.Serialization.XmlInclude(typeof(Model))]
	public class Script : Model
	{
		[Link] Plant Grapevine;
		[Link] Clock Clock;

		[Description("Prune Date")]
		public string PruneDateString { get; set; }
		[XmlIgnore] private DateTime PruneDate { get; set; }
		[XmlIgnore] private RemovalFractions Remove { get; set; }
		
		[EventSubscribe("Commencing")]
		private void OnSimulationCommencing(object sender, EventArgs e)
		{
			Remove = new RemovalFractions();
		}
		
		[EventSubscribe("DoManagement")]
		private void OnDoManagement(object sender, EventArgs e)
		{
			//Set up  array of remove fractions to send with Cut method.  Each member in the array corresponds to an organ in the same order they are set up in.
			PruneDate = DateTime.Parse(PruneDateString);
						
			if (PruneDate.Month == Clock.Today.Month && PruneDate.Day == Clock.Today.Day)
			{
				Remove.SetPhenologyStage = 1;
				Grapevine.RemoveBiomass("Prune", Remove);
			}
		}
	}
}
```
  Experiment PhenoTest
    Factors
      Factor Climate
        Specifications=[Weather].FileName = Site1001.met, Site1002.met, Site1003.met, Site1004.met
    Simulation PhenologyBase
      Weather: FileName=Site1003.met
      Clock: StartDate=2005-05-13; EndDate=2012-09-29
      Summary
      SoilArbitrator Soil Arbitrator
      Zone Vineyard: Area=0; Slope=0
        Soil: same as grapeTest.Vineyard.Soil
        SurfaceOrganicMatter: same as grapeTest.Vineyard.SurfaceOrganicMatter
        MicroClimate: same as grapeTest.Vineyard.MicroClimate
        Irrigation
        Fertiliser
        Plant Grapevine: CropType=Grapevine; SowingDate=2005-05-01
        Operations
          2005-05-13  [Grapevine].Sow(population: 0.1667, cultivar: "Sauvignonblac", depth: 50, rowSpacing: 3100, budNumber:24);
        Report: EventNames=[Clock].DoReport
        Manager Pruning: same as grapeTest.Vineyard.Pruning
    Folder Validation
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